// ZIP case 2: constant current (P = 0, I = 1, Z = 0)
#define CASE_NAME=constant_current
#define ZIP_POWER_FRACTION=0.0
#define ZIP_CURRENT_FRACTION=1.0
#define ZIP_IMPEDANCE_FRACTION=0.0
#define XFMR_KVA=25
#include "glm/model.glm"
