// ZIP case 3: constant impedance (P = 0, I = 0, Z = 1)
#define CASE_NAME=constant_impedance
#define ZIP_POWER_FRACTION=0.0
#define ZIP_CURRENT_FRACTION=0.0
#define ZIP_IMPEDANCE_FRACTION=1.0
#define XFMR_KVA=25
#include "glm/model.glm"
