// Auto-generated by scripts/run_cases.py -- do not edit.
#define CASE_NAME=constant_impedance
#define ZIP_POWER_FRACTION=0.0
#define ZIP_CURRENT_FRACTION=0.0
#define ZIP_IMPEDANCE_FRACTION=1.0
#define XFMR_KVA=37.5
#include "glm/model.glm"
